*Heading
 Bulk indentation R=15um with subroutine
** Job name: bulk-indent Model name: Quasi-static1
** Generated by: Abaqus/CAE 6.14-2
*Preprint, echo=NO, model=NO, history=NO, contact=NO
**
** PARTS
**
*Part, name=Indenter
*Node
      1,           0., -0.00308471429
      2, 0.0142587461, -0.00465705618
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*Element, type=CAX4H
    1,     5,     6,   739,   738
    2,     6,     7,   740,   739
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*Nset, nset=_PickedSet5, internal, generate
     1,  13779,      1
*Elset, elset=_PickedSet5, internal, generate
     1,  13550,      1
** Section: indenter
*Solid Section, elset=_PickedSet5, material=DIAMOND
,
*End Part
**
*Part, name=Substrate
*Node
      1,           0.,           0.
      2, 0.00361111108,           0.
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*Element, type=CAX4R
   1,    1,    2,   75,   74
   2,    2,    3,   76,   75
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*Nset, nset=_PickedSet26, internal, generate
    1,  5110,     1
*Elset, elset=_PickedSet26, internal, generate
    1,  4968,     1
** Section: glass section
*Solid Section, elset=_PickedSet26, material=GlASS
,
*End Part
**
*Part, name="bulk(wide)-small mesh"
*Node
      1,  0.219999999,    6.1935854
      2,           0.,    6.1935854
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*Element, type=CAX4H
  1,    1,   23, 1188,  130
  2,   23,   24, 1189, 1188
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*Element, type=CAX3
4392, 5644, 5569, 5570
4393, 5710, 5292, 5733
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*Nset, nset=_PickedSet13, internal, generate
     1,  15516,      1
*Elset, elset=_PickedSet13, internal, generate
     1,  15342,      1
*Elset, elset="_bulk(tin) top_S3", internal
 2977, 2978, 2979, 2980, 2981, 2982
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*Elset, elset="_bulk(tin) top_S1", internal
 4489, 4493, 4497, 4511, 4568, 4587
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*Elset, elset="_bulk(tin) top_S4", internal
 4585,
*Elset, elset="_bulk(tin) top_S2", internal
 4929, 5804, 6093
*Surface, type=ELEMENT, name="bulk(tin) top"
"_bulk(tin) top_S3", S3
"_bulk(tin) top_S1", S1
"_bulk(tin) top_S4", S4
"_bulk(tin) top_S2", S2
** Section: UMAT section
*Solid Section, elset=_PickedSet13, material=TANIA
,
*End Part
**
**
** ASSEMBLY
**
*Assembly, name=Assembly
**
*Instance, name=Indenter-1, part=Indenter
          0.,       0.0075,           0.
*End Instance
**
*Instance, name=Substrate-1, part=Substrate
          0.,      -3.2575,           0.
*End Instance
**
*Instance, name="bulk(wide)-small mesh-1", part="bulk(wide)-small mesh"
          0.,      -6.2575,           0.
*End Instance
**
*Node
      1,  4.59242559e-19,  0.014999914
*Nset, nset=_PICKEDSET32, internal
 1,
*Nset, nset=_PICKEDSET36, internal
 1,
*Nset, nset=_PICKEDSET209, internal
 1,
*Nset, nset=_PICKEDSET210, internal
 1,
*Nset, nset=_PickedSet25, internal
 1,
*Nset, nset=_PickedSet26, internal
 1,
*Nset, nset=_PickedSet51, internal
 1,
*Nset, nset=_PickedSet52, internal, instance=Indenter-1, generate
     1,  13779,      1
*Elset, elset=_PickedSet52, internal, instance=Indenter-1, generate
     1,  13550,      1
*Nset, nset=_PickedSet154, internal, instance=Substrate-1, generate
  1,  73,   1
*Elset, elset=_PickedSet154, internal, instance=Substrate-1, generate
  1,  72,   1
*Nset, nset=_PickedSet278, internal, instance="bulk(wide)-small mesh-1"
   3,   7,   8,  14,  21, 187
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*Elset, elset=_PickedSet278, internal, instance="bulk(wide)-small mesh-1"
  1387,  1388,  1389,  1390,  1391,  1392
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*Elset, elset=_fine_indenter_S2, internal, instance=Indenter-1
  8836,  8837,  8838,  8839,  8840,  8841
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*Elset, elset=_fine_indenter_S1, internal, instance=Indenter-1, generate
 8929,  9062,     1
*Surface, type=ELEMENT, name=fine_indenter
_fine_indenter_S2, S2
_fine_indenter_S1, S1
*Elset, elset=__PickedSurf47_S3, internal, instance=Substrate-1, generate
 4897,  4968,     1
*Surface, type=ELEMENT, name=_PickedSurf47, internal
__PickedSurf47_S3, S3
*Elset, elset=__PickedSurf277_S3, internal, instance="bulk(wide)-small mesh-1", generate
 15305,  15342,      1
*Surface, type=ELEMENT, name=_PickedSurf277, internal
__PickedSurf277_S3, S3
** Constraint: RigidBody-1
*Rigid Body, ref node=_PickedSet51, elset=_PickedSet52
** Constraint: sample to substrate
*Tie, name="sample to substrate", adjust=yes
_PickedSurf277, _PickedSurf47
*End Assembly
**
** MATERIALS
**
*Material, name=DIAMOND
*Density
 2.5e-09,
*Elastic
 1.22e+06, 0.2
*Material, name=GLASS
*Density
 2.5e-09,
*Elastic
70000., 0.2
**  Hyper elastic PDMS behaviour using the Neo Hookean model
**
*Material, name=HYPERLEASTICPDMS
*Density
 9.7e-13,
*Hyperelastic, neo hooke
 0.06002, 0.01667
**  Elasto-plastic behaviour only, not taking into account viscoelasticity
*Material, name=PDMS
*Density
 9.7e-13,
*Elastic
 0.36, 0.5
*Plastic
 2.24,0.
**  Viscoelastic material based on Standadr Solid Model, parameters obtained
** from
**  indentation tests and analytical solutions.
*Material, name=TANIA
*Density
 9.7e-13,
*User Material, constants=10
0.,0.,0.,0.,0.,0.,0.,0.
0.,0.
*Material, name=VISHAY
*Density
 1.2e-09,
*Elastic
4., 0.5
*Material, name="nylon 66"
*Density
 1.183e-06,
*Elastic
300., 0.4
**
** INTERACTION PROPERTIES
**
*Surface Interaction, name=CONTACT
1.,
*Friction
0.,
**
** BOUNDARY CONDITIONS
**
** Name: Base Type: Symmetry/Antisymmetry/Encastre
*Boundary
_PickedSet154, ENCASTRE
** Name: Indenter mov Type: Displacement/Rotation
*Boundary
_PickedSet25, 1, 1
_PickedSet25, 6, 6
** Name: Roller Type: Displacement/Rotation
*Boundary
_PickedSet278, 1, 1
**
** INTERACTIONS
**
** Interaction: contact-ss
*Contact Pair, interaction=CONTACT, type=SURFACE TO SURFACE
"bulk(wide)-small mesh-1"."bulk(tin) top", fine_indenter
** ----------------------------------------------------------------
**
** STEP: Indentation_visco
**
*Step, name=Indentation_visco, nlgeom=YES, amplitude=RAMP, inc=2000
*Visco, cetol=5e-07
0.001, 4.075, 1e-10, 0.01
**
** LOADS
**
** Name: Indenter load   Type: Concentrated force
*Cload
_PickedSet26, 2, -9.5e-06
**
** INTERACTIONS
**
** Contact Controls for Interaction: contact-ss
*Contact Controls, master=fine_indenter, slave="bulk(wide)-small mesh-1"."bulk(tin) top", reset
*Contact Controls, master=fine_indenter, slave="bulk(wide)-small mesh-1"."bulk(tin) top", stabilize=0.001
**
** OUTPUT REQUESTS
**
*Restart, write, frequency=0
**
** FIELD OUTPUT: F-Output-1
**
*Output, field
*Node Output
U,
*Element Output, directions=YES
LE, MISES, S
*Contact Output
CFORCE, CNAREA
**
** HISTORY OUTPUT: H-Output-1
**
*Output, history
*Contact Output
CAREA, CFN1, CFN2, CFN3, CFNM
*End Step
** ----------------------------------------------------------------
**
** STEP: Holding_visco
**
*Step, name=Holding_visco, nlgeom=YES, amplitude=RAMP, inc=1000
*Visco, cetol=5e-07
0.001, 2.1019, 1e-10, 0.1
**
** OUTPUT REQUESTS
**
*Restart, write, frequency=0
**
** FIELD OUTPUT: F-Output-1
**
*Output, field
*Node Output
U,
*Element Output, directions=YES
LE, MISES, S
*Contact Output
CFORCE, CNAREA
**
** HISTORY OUTPUT: H-Output-1
**
*Output, history
*Contact Output
CAREA, CFN1, CFN2, CFN3, CFNM
*End Step
